# Worksheet setting: ORIGIN = 1
## Example: 5-Story Shear Building (Chopra, Ch-13)
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g = 386.089 in/s^2
m_a := 100*kip/g = 0.259008 kip/(in/s^2)
ζ_n := 0.05
k := 31.54*kip/in
n := 1 .. 5
h[n] := n*12*ft
transpose(h) = [12, 24, 36, 48, 60] ft
## 1. Define Mass and Stiffness Matrices
m := m_a*identity(5) = [
    0.259008, 0, 0, 0, 0;
    0, 0.259008, 0, 0, 0;
    0, 0, 0.259008, 0, 0;
    0, 0, 0, 0.259008, 0;
    0, 0, 0, 0, 0.259008
] kip/(in/s^2)
k := k*[2, -1, 0, 0, 0; -1, 2, -1, 0, 0; 0, -1, 2, -1, 0; 0, 0, -1, 2, -1; 0, 0, 0, -1, 1] = [
    63.08, -31.54, 0, 0, 0;
    -31.54, 63.08, -31.54, 0, 0;
    0, -31.54, 63.08, -31.54, 0;
    0, 0, -31.54, 63.08, -31.54;
    0, 0, 0, -31.54, 31.54
] kip/in
## 2. Determine Natural Vibration Frequencies and Mode Shapes
# Since Mathcad does not always provide the mode shapes and frequencies in appropriate order, the following function is constructed, which provides frequencies and mass normalized mode shapes in appropriate order.
FreqMassNormModeShapes(k, m) :=
    ω_unsort ← sqrt(genvals(k, m))
    Φ_unsort ← genvecs(k, m)
    ω ← sort(ω_unsort)
    ind ← match(ω[1], ω_unsort)[1]
    Φ[:, 1] ← Φ_unsort[:, ind]/sqrt(transpose(Φ_unsort[:, ind])*m*Φ_unsort[:, ind])
    for i ∈ 2 .. length(ω)
        ind ← match(ω[i], ω_unsort)[1]
        Φ[:, i] ← Φ_unsort[:, ind]/sqrt(transpose(Φ_unsort[:, ind])*m*Φ_unsort[:, ind])
        Φ ← augment(Φ, Φ[:, i])
    results ← augment(ω, Φ)
# Natural frequencies
ω := submatrix(FreqMassNormModeShapes(k*in/kip, m*in/(kip*s^2)), 1, 5, 1, 1)*rad/s
transpose(ω) = [3.1409, 9.16825, 14.4528, 18.5666, 21.1761] rad/s
T := 2*π/ω
transpose(T) = [2.00044, 0.68532, 0.434737, 0.338414, 0.296711] s
# Mass normalized mode shapes:
Φ := submatrix(FreqMassNormModeShapes(k*in/kip, m*in/(kip*s^2)), 1, 5, 2, 6)
Φ = [
    0.333821, -0.895478, 1.17283, -1.07781, 0.640599;
    0.640599, -1.17283, 0.333821, 0.895478, -1.07781;
    0.895478, -0.640599, -1.07781, 0.333821, 1.17283;
    1.07781, 0.333821, -0.640599, -1.17283, -0.895478;
    1.17283, 1.07781, 0.895478, 0.640599, 0.333821
]
## 3. Modal Expansion of Effective Earthquake Forces:
M[n] := sum(m[j, j]*Φ[j, n]^2, j = 1 .. 5)
transpose(M) = [1, 1, 1, 1, 1] kip*s^2/in
Lh[n] := sum(m[j, j]*Φ[j, n], j = 1 .. 5)
transpose(Lh) = [1.06725, -0.336003, 0.177088, -0.0986148, 0.0450563] kip*s^2/in
Lθ[n] := sum(h[j]*m[j, j]*Φ[j, n], j = 1 .. 5)
transpose(Lθ)/h[1] = [3.74961, 0.404419, 0.13521, 0.0586118, 0.0234792] kip*s^2/in
Γ[n] := Lh[n]/M[n]
transpose(Γ) = [1.06725, -0.336003, 0.177088, -0.0986148, 0.0450563]
j := 1 .. 5
s_n[j, n] := Γ[n]*m[j, j]*Φ[j, n]
s_n = [
    0.0922771, 0.0779313, 0.0537943, 0.0275295, 0.00747574;
    0.177079, 0.102068, 0.0153115, -0.0228723, -0.012578;
    0.247534, 0.0557497, -0.0494362, -0.00852647, 0.0136868;
    0.297936, -0.0290517, -0.0293825, 0.0299564, -0.0104502;
    0.324201, -0.0937993, 0.0410731, -0.0163622, 0.00389567
] kip*s^2/in
sum(s_n[j, n], n = 1 .. 5) = [0.259008; 0.259008; 0.259008; 0.259008; 0.259008] kip*s^2/in
ι := transpose([1, 1, 1, 1, 1])
s := m*ι = [0.259008; 0.259008; 0.259008; 0.259008; 0.259008] kip*s^2/in
s/m_a = [1; 1; 1; 1; 1]
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## 4. Modal Static Responses
# Modal static base shear:
V_bstn[n] := sum(s_n[j, n], j = 1 .. 5)
transpose(V_bstn)/m_a = [4.39765, 0.435887, 0.121078, 0.0375466, 0.00783787]
# Alternatively,
V_bstn[n] := Γ[n]*Lh[n]
transpose(V_bstn)/m_a = [4.39765, 0.435887, 0.121078, 0.0375466, 0.00783787]
# Modal fifth-story shear:
V_5stn[n] := sum(s_n[j, n], j = 5 .. 5)
transpose(V_5stn)/m_a = [1.2517, -0.362148, 0.158578, -0.0631725, 0.0150408]
# Modal base moment:
M_bstn[n] := sum(h[j]*s_n[j, n], j = 1 .. 5)
transpose(M_bstn)/(m_a*h[1]) = [15.4504, -0.524641, 0.0924456, -0.0223159, 0.00408438]
# Alternatively,
M_bstn[n] := Γ[n]*Lθ[n]
transpose(M_bstn)/(m_a*h[1]) = [15.4504, -0.524641, 0.0924456, -0.0223159, 0.00408438]
# Roof displacement:
u_5stn[n] := Γ[n]*Φ[5, n]/ω[n]^2
transpose(u_5stn) = [0.12688, -0.00430838, 0.000759168, -0.000183259, 3.35411e-5] s^2
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# Effective modal masses:
Mstar[n] := V_bstn[n]
transpose(Mstar)/m_a = [4.39765, 0.435887, 0.121078, 0.0375466, 0.00783787]
# Check summation:
sum(Mstar[n], n = 1 .. 5) = 1.29504 kip*s^2/in
sum(m[j, j], j = 1 .. 5) = 1.29504 kip*s^2/in
# Effective modal heights:
hstar[n] := M_bstn[n]/V_bstn[n]
transpose(hstar)/h[1] = [3.51334, -1.20362, 0.763521, -0.594351, 0.521109]
# Check summation:
sum(hstar[n]*Mstar[n], n = 1 .. 5) = 559.457 kip*s^2
sum(h[j]*m[j, j], j = 1 .. 5) = 559.457 kip*s^2
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## 5. Earthquake Excitation
# Define the El Centro ground motion at time instants equally spaced at every Δt. Here Δt=0.01 sec is used to accurately define the ground motion and to accurately determine the response of the highest mode (T_5=0.2967 sec)
path := "..\ElCentro_Chopra_time_accel.txt"
GMData := transpose(READPRN(path))
GMData =  # no stored result
# Read time and accel values:
t_gm := transpose(GMData)[:, 1]
uddg_gm := transpose(GMData)[:, 2]
# New time variable for analysis:
Δt := 0.01
t_max := max(t_gm) = 31.18
N := t_max/Δt = 3118
j := 1 .. N
t[j] := (j - 1)*Δt
uddg := linterp(t_gm, uddg_gm, t)
PGA := max(vectorize(|uddg|)) = 0.31882
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## 6. Response of SDF Systems
## Exact solution based on linear interpolation of excitation
LinExact(k, ω, ζ, Δt, u0, ud0, p) :=
    ω_D ← ω*sqrt(1 - ζ^2)
    A ← e^(-ζ*ω*Δt)*((ζ/sqrt(1 - ζ^2))*sin(ω_D*Δt) + cos(ω_D*Δt))
    B ← e^(-ζ*ω*Δt)*(1/ω_D*sin(ω_D*Δt))
    C1 ← e^(-ζ*ω*Δt)*(((1 - 2*ζ^2)/(ω_D*Δt) - ζ/sqrt(1 - ζ^2))*sin(ω_D*Δt))
    C2 ← e^(-ζ*ω*Δt)*((1 + 2*ζ/(ω*Δt))*cos(ω_D*Δt))
    C ← (1/k)*((2*ζ/(ω*Δt)) + C1 - C2)
    D1 ← e^(-ζ*ω*Δt)*(((2*ζ^2 - 1)/(ω_D*Δt))*sin(ω_D*Δt))
    D2 ← e^(-ζ*ω*Δt)*((2*ζ/(ω*Δt))*cos(ω_D*Δt))
    D ← (1/k)*(1 - 2*ζ/(ω*Δt) + D1 + D2)
    Ap ← -(e^(-ζ*ω*Δt))*(ω/sqrt(1 - ζ^2)*sin(ω_D*Δt))
    Bp ← e^(-ζ*ω*Δt)*(cos(ω_D*Δt) - (ζ/sqrt(1 - ζ^2))*sin(ω_D*Δt))
    Cp1 ← e^(-ζ*ω*Δt)*((ω/sqrt(1 - ζ^2) + ζ/(Δt*sqrt(1 - ζ^2)))*sin(ω_D*Δt))
    Cp2 ← e^(-ζ*ω*Δt)*((1/Δt)*cos(ω_D*Δt))
    Cp ← (1/k)*((-1/Δt) + Cp1 + Cp2)
    Dp ← (1/(k*Δt))*(1 - A)
    u[1] ← u0
    ud[1] ← ud0
    for j ∈ 1 .. (length(p) - 1)
        u[j + 1] ← A*u[j] + B*ud[j] + C*p[j] + D*p[j + 1]
        ud[j + 1] ← Ap*u[j] + Bp*ud[j] + Cp*p[j] + Dp*p[j + 1]
    result ← u
# Deformation response for each mode:
D[:, n] := LinExact((ω[n]*sec)^2, ω[n]*sec, ζ_n, Δt, 0, 0, -uddg*g*sec^2/in)
D =  # no stored result
# Pseudo-acceleration response in g:
A[:, n] := (ω[n]*sec)^2*D[:, n]/(g*sec^2/in)
A =  # no stored result
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# Max deformations:
SD[n] := max(vectorize(|D[:, n]|))
transpose(SD) = [5.3775, 2.58322, 1.50384, 0.877121, 0.651665]  # in
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# Max deformations:
PSA[n] := max(vectorize(|A[:, n]|))
transpose(PSA) = [0.137405, 0.562404, 0.813617, 0.783132, 0.756885]  # g
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## 7. Modal and Total Responses
## Base Shear
# Modal base shear:
V_bn[:, n] := V_bstn[n]*A[:, n]*g
# Total base shear:
V_b := sum(V_bn[:, n], n = 1 .. 5)
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# Max base shear:
V_bnmax[n] := max(vectorize(|V_bn[:, n]|))
transpose(V_bnmax) = [60.4259, 24.5145, 9.85111, 2.9404, 0.593236] kip
V_bmax := max(vectorize(|V_b|)) = 73.2116 kip
## Fifth-Story Shear
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# Modal fifth-story shear:
V_5n[:, n] := V_5stn[n]*A[:, n]*g
# Total fifth-story shear:
V_5 := sum(V_5n[:, n], n = 1 .. 5)
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# Max fifth-story shear:
V_5nmax[n] := max(vectorize(|V_5n[:, n]|))
transpose(V_5nmax) = [17.199, 20.3674, 12.9022, 4.94724, 1.13841] kip
V_5max := max(vectorize(|V_5|)) = 35.1702 kip
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## Roof Displacement
# Modal roof displacement:
u_5n[:, n] := u_5stn[n]*A[:, n]*g
# Total roof displacement:
u_5 := sum(u_5n[:, n], n = 1 .. 5)
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# Max roof displacement:
u_5nmax[n] := max(vectorize(|u_5n[:, n]|))
transpose(u_5nmax) = [6.73102, 0.935511, 0.238476, 0.0554099, 0.00980153] in
u_5max := max(vectorize(|u_5|)) = 6.84005 in
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## Base Moment
# Modal base moment:
M_bn[:, n] := M_bstn[n]*A[:, n]*g
# Total base moment:
M_b := sum(M_bn[:, n], n = 1 .. 5)
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# Max base moment:
M_bnmax[n] := max(vectorize(|M_bn[:, n]|))
transpose(M_bnmax) = [2547.56, 354.072, 90.2584, 20.9715, 3.70968] kip*ft
M_bmax := max(vectorize(|M_b|)) = 2588.82 kip*ft
